// COMSOL Multiphysics 4.1 (Build: 88) model "COMSOL_metab.mph"
// Outline of the model tree

Parameters
  L = 240
  x_0 = 0.45-0.06
  y_0 = 0.02-0.03
  x_1 = 0.24-0.06
  y_1 = 0.17-0.03
  x_2 = 0.6-0.06
  y_2 = 0.23-0.03
  x_3 = 0.23-0.06
  y_3 = 0.27-0.03
  x_4 = 0.55-0.06
  y_4 = 0.33-0.03
  x_5 = 1.02-0.06
  y_5 = .41-0.03
  x_6 = 0.96-0.06  // .
  y_6 = 0.43-0.03
  x_7 = 0.27-0.06
  y_7 = 0.6-0.03
  x_8 = 0.53-0.06
  y_8 = 0.65-0.03
  x_9 = 0.59-0.06
  y_9 = 0.62-0.03
  x_10 = 0.67-0.06
  y_10 = 0.69-0.03
  x_11 = 0.13-0.06
  y_11 = 0.75-0.03
  x_12 = 0.15-0.06
  y_12 = 0.93-0.03
  x_13 = 0.2-0.06
  y_13 = 0.87-0.03
  x_14 = 0.28-0.06
  y_14 = 0.98-0.03
  x_15 = 0.8-0.06
  y_15 = 0.85-0.03
  x_16 = 0.83-0.06
  y_16 = 0.92-0.03
  alpha = 50
  R = L/alpha
  K_0 = 1
  K_com = K_0/(2*pi*R)
  M = 1.736*10^-4
  phi_0 = 0.4

Geometry
  geom1 "Geometry 1" (2D, length unit m)
    sq1: Square | pos = {0, 0}; base = corner; size = L
    c1: Circle | pos = {(x_0*0.8+0.1)*L, (y_0*0.8+0.1)*L}; base = center; r = R
    c2: Circle | pos = {(x_1*0.8+0.1)*L, (y_1*0.8+0.1)*L}; base = center; r = R
    c3: Circle | pos = {(x_2*0.8+0.1)*L, (y_2*0.8+0.1)*L}; base = center; r = R
    c4: Circle | pos = {(x_3*0.8+0.1)*L, (y_3*0.8+0.1)*L}; base = center; r = R
    c5: Circle | pos = {(x_4*0.8+0.1)*L, (y_4*0.8+0.1)*L}; base = center; r = R
    c6: Circle | pos = {(x_5*0.8+0.1)*L, (y_5*0.8+0.1)*L}; base = center; r = R
    c7: Circle | pos = {(x_6*0.8+0.1)*L, (y_6*0.8+0.1)*L}; base = center; r = R
    c8: Circle | pos = {(x_7*0.8+0.1)*L, (y_7*0.8+0.1)*L}; base = center; r = R
    c9: Circle | pos = {(x_8*0.8+0.1)*L, (y_8*0.8+0.1)*L}; base = center; r = R
    c10: Circle | pos = {(x_9*0.8+0.1)*L, (y_9*0.8+0.1)*L}; base = center; r = R
    c11: Circle | pos = {(x_10*0.8+0.1)*L, (y_10*0.8+0.1)*L}; base = center; r = R
    c12: Circle | pos = {(x_11*0.8+0.1)*L, (y_11*0.8+0.1)*L}; base = center; r = R
    c13: Circle | pos = {(x_12*0.8+0.1)*L, (y_12*0.8+0.1)*L}; base = center; r = R
    c14: Circle | pos = {(x_13*0.8+0.1)*L, (y_13*0.8+0.1)*L}; base = center; r = R
    c15: Circle | pos = {(x_14*0.8+0.1)*L, (y_14*0.8+0.1)*L}; base = center; r = R
    c16: Circle | pos = {(x_15*0.8+0.1)*L, (y_15*0.8+0.1)*L}; base = center; r = R
    c17: Circle | pos = {(x_16*0.8+0.1)*L, (y_16*0.8+0.1)*L}; base = center; r = R
    dif1: Difference | input = sq1; input2 = c1, c10, c11, c12, c13, c14, c15, c16, c17, c2, c3, c4, c5, c6, c7, c8, c9
    fin: Finalize "Form Union"

Physics
  poeq: PoissonEquation "PDE"
    dependent variable u
    peq1: PoissonEquation "Poisson's Equation 1" | f = -M*u/(u+phi_0)
    zflx1: ZeroFluxBoundary "Zero Flux 1"
    init1: init "Initial Values 1"
    dir1: DirichletBoundary "Dirichlet Boundary Condition 1" | r = 0.3
    flux2: FluxBoundary "Flux/Source 2" | g = K_com; q = K_com
    flux3: FluxBoundary "Flux/Source 3" | q = K_com

Mesh
  mesh1 "Mesh 1" (physics-controlled)
    size: MeshSizeDefault | hauto = 5

Studies
  std1 "Study 1"
    stat: Stationary

Solver configurations
  sol1 "Solver 1" (study std1)
    v1: Variables "Dependent Variables 1"
    s1: Stationary "Stationary Solver 1"
      dDef: Direct
      fc1: FullyCoupled

Datasets
  dset1: Solution | solution = sol1

Derived values
  int1: IntLine "Line Integration 1" | data = dset1; table = tbl2; expr = poeq.g_u
  int2: IntLine "Line Integration 2" | data = dset1; table = tbl2; expr = poeq.g_u
  int3: IntLine "Line Integration 3" | data = dset1; table = tbl2; expr = poeq.g_u
  int4: IntLine "Line Integration 4" | data = dset1; table = tbl2; expr = poeq.g_u
  int5: IntLine "Line Integration 5" | data = dset1; table = tbl2; expr = poeq.g_u
  int6: IntLine "Line Integration 6" | data = dset1; table = tbl2; expr = poeq.g_u
  int7: IntLine "Line Integration 7" | data = dset1; table = tbl2; expr = poeq.g_u
  int8: IntLine "Line Integration 8" | data = dset1; table = tbl2; expr = poeq.g_u
  int9: IntLine "Line Integration 9" | data = dset1; table = tbl2; expr = poeq.g_u
  int10: IntLine "Line Integration 10" | data = dset1; table = tbl2; expr = poeq.g_u
  int11: IntLine "Line Integration 11" | data = dset1; table = tbl2; expr = poeq.g_u
  int12: IntLine "Line Integration 12" | data = dset1; table = tbl2; expr = poeq.g_u
  int13: IntLine "Line Integration 13" | data = dset1; table = tbl2; expr = poeq.g_u
  int14: IntLine "Line Integration 14" | data = dset1; table = tbl2; expr = poeq.g_u
  int15: IntLine "Line Integration 15" | data = dset1; table = tbl2; expr = poeq.g_u
  int16: IntLine "Line Integration 16" | data = dset1; table = tbl2; expr = poeq.g_u
  int17: IntLine "Line Integration 17" | data = dset1; table = tbl2; expr = poeq.g_u

Tables
  tbl1: Table "q_linear"
    // Line Integration 1 (poeq.g_u)
    Boundary flux/source | Boundary flux/source | Boundary flux/source | Boundary flux/source | Boundary flux/source | Boundary flux/source | Boundary flux/source | Boundary flux/source | Boundary flux/source | Boundary flux/source | Boundary flux/source | Boundary flux/source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
    0.299039 | 0.30334 | -0.454896 | 0.312482 | 0.343665 | -0.365159 | 0.458555 | 0.366269 | -0.503043 | 0.339255 | 0.290858 | -0.367921
  tbl2: Table "q_metab"
    // Line Integration 1 (poeq.g_u)
    Boundary flux/source | Boundary flux/source | Boundary flux/source | Boundary flux/source | Boundary flux/source | Boundary flux/source | Boundary flux/source | Boundary flux/source | Boundary flux/source | Boundary flux/source | Boundary flux/source | Boundary flux/source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
    0.478849 | 0.435954 | -0.285413 | 0.440674 | 0.509029 | -0.28736 | 0.569023 | 0.505499 | -0.357501 | 0.479892 | 0.443782 | -0.283159

Plots
  pg1: PlotGroup2D "2D Plot Group 1" | data = dset1
    surf1: Surface | expr = u

Exports
  plot1: Plot
    filename = /home/pdavid/Bureau/SS/2D_cartesian/Updated_BCs/Figures_and_Tests/Multiple_sources/COMSOL_output/linear/contour.txt