// COMSOL Multiphysics 4.1 (Build: 88) model "Off_center.mph"
// Outline of the model tree

Parameters
  L = 240
  alpha = 240
  R = L/alpha
  K_0 = 1
  K_com = K_0/(2*pi*R)
  M = 1.736*10^-4
  phi_0 = 0.4

Selections
  poeq_dst_pc1 "Selection 1"

Geometry
  geom1 "Geometry 1" (2D, length unit m)
    sq1: Square | pos = {0, 0}; base = corner; size = L
    c1: Circle | pos = {0.5*L, 0.5*L}; base = center; r = R
    dif1: Difference | input = sq1; input2 = c1, c10, c11, c12, c13, c14, c15, c16, c17, c2, c3, c4, c5, c6, c7, c8, c9
    fin: Finalize "Form Union"

Physics
  poeq: PoissonEquation "PDE"
    dependent variable u
    peq1: PoissonEquation "Poisson's Equation 1" | f = -M*u/(u+phi_0)*0
    zflx1: ZeroFluxBoundary "Zero Flux 1"
    init1: init "Initial Values 1"
    dir1: DirichletBoundary "Dirichlet Boundary Condition 1" | r = 0.2
    flux2: FluxBoundary "Flux/Source 2" | g = K_com; q = K_com
    flux3: FluxBoundary "Flux/Source 3" | q = K_com
    pc1: PeriodicCondition

Mesh
  mesh1 "Mesh 1" (physics-controlled)
    size: MeshSizeDefault | hauto = 3

Studies
  std1 "Study 1"
    stat: Stationary

Solver configurations
  sol1 "Solver 1" (study std1)
    v1: Variables "Dependent Variables 1"
    s1: Stationary "Stationary Solver 1"
      dDef: Direct
      fc1: FullyCoupled

Datasets
  dset1: Solution | solution = sol1
  cln1: CutLine2D | data = dset1; genpoints = {{0, L/2}, {L, L/2}}
  cln2: CutLine2D | data = dset1; genpoints = {{L/2, 0}, {L/2, L}}

Derived values
  int1: IntLine "Line Integration 1" | data = dset1; table = tbl4; expr = poeq.g_u

Tables
  tbl1: Table
    // Line Integration 1 (poeq.g_u)
    Boundary flux/source
    0.437024
  tbl2: Table
    // Line Integration 1 (poeq.g_u)
    Boundary flux/source
    0.691098
  tbl3: Table
    // Line Integration 1 (poeq.g_u)
    Boundary flux/source
    0.590066
  tbl4: Table
    // Line Integration 1 (poeq.g_u)
    Boundary flux/source
    0.384659

Plots
  pg1: PlotGroup2D "2D Plot Group 1" | data = dset1
    surf1: Surface | expr = u
  pg2: PlotGroup1D "1D Plot Group 2" | data = cln1
    lngr1: LineGraph | data = cln1; expr = u
    lngr2: LineGraph | data = cln2; expr = u

Exports
  plot1: Plot
    filename = /home/pdavid/Bureau/SS/2D_cartesian/Updated_BCs/Figures_and_Tests/Multiple_sources/COMSOL_output/linear/contour.txt
  plot2: Plot
    filename = /home/pdavid/Bureau/Hybrid_2D_beta/Figures_and_Tests/base/COMSOL_output/alpha240/linear/contour.txt
  plot3: Plot
    filename = /home/pdavid/Bureau/Hybrid_2D_beta/Figures_and_Tests/base/COMSOL_output/alpha240/metab/contour.txt
  plot4: Plot
    filename = /home/pdavid/Bureau/Hybrid_2D_beta/Figures_and_Tests/base/COMSOL_output/alpha240/linear/contour.txt
  plot5: Plot
    filename = /home/pdavid/Bureau/Hybrid_2D_beta/Figures_and_Tests/base/COMSOL_output/alpha240/linear/contour.txt
  plot6: Plot
    filename = /home/pdavid/Bureau/Hybrid_2D_beta/Figures_and_Tests/base/COMSOL_output/alpha240/metab/contour.txt
  plot7: Plot
    filename = /home/pdavid/Bureau/Hybrid_2D_beta/Figures_and_Tests/base/COMSOL_output/alpha240/metab/contour.txt
  plot8: Plot
    filename = /home/pdavid/Bureau/Hybrid_2D_beta/Figures_and_Tests/base/COMSOL_output/alpha240/linear/contour.txt
  data1: Data | data = cln2
  plot9: Plot | filename = /home/pdavid/Bureau/Hybrid_2D_beta/Figures_and_Tests/base_small/COMSOL_output/linear/plot_x.txt
  plot10: Plot | filename = /home/pdavid/Bureau/Hybrid_2D_beta/Figures_and_Tests/base_small/COMSOL_output/metab/plot_y.txt
  plot11: Plot | filename = /home/pdavid/Bureau/Hybrid_2D_beta/Figures_and_Tests/base_small/COMSOL_output/metab/plot_x.txt
  plot12: Plot | filename = /home/pdavid/Bureau/Hybrid_2D_beta/Figures_and_Tests/base_small/COMSOL_output/metab/plot_y.txt
  plot13: Plot
    filename = /home/pdavid/Bureau/Hybrid_2D_beta/Figures_and_Tests/base_small/COMSOL_output/linear/plot_x.txt
  plot14: Plot
    filename = /home/pdavid/Bureau/Hybrid_2D_beta/Figures_and_Tests/base_small/COMSOL_output/linear/plot_y.txt